// COMSOL Multiphysics 5.5.0.359 model "tasnia.mph"
// Outline of the model tree

Parameters
  u_max = 470e-6[m/s]  // Maximum velocity of blood
  Y_t = 6e-6[m]  // Blood stream thickness

Geometry
  geom1 "Geometry 1" (2D, length unit µm)
    r1: Rectangle | pos = {0, -6}; size = {300, 12}
    r2: Rectangle | pos = {0, 6}; size = {300, 1}
    fin: Finalize "Form Union"

Materials
  mat1: Common "blood layer" on domains 1
    def "Basic"
      density = 1060
      dynamicviscosity = 0.0035
  mat2: Common "alveolar epithelium" on domains 2
    def "Basic"
      density = 1000
      dynamicviscosity = 1e-3

Physics
  tds: DilutedSpecies "Transport of Diluted Species" on all domains
    dependent variable c
    cdm1: ConvectionDiffusionMigration "Transport Properties 1" (default)
    nflx1: NoFlux (default)
    init1: init "Initial Values 1" (default)
    in1: Inflow on boundaries 1 | c0 = 2.9018
    fl1: FluxBoundary "Flux 1" on boundaries 5 | FluxType = ExternalConvection; species = 1; kc = 3.97e-8; cb = 0.4643
    out1: Outflow on boundaries 6
  spf: LaminarFlow on all domains
    dependent variable u = {u, v, w}
    fp1: FluidProperties (default)
    init1: init "Initial Values 1" (default)
    wallbc1: WallBC "Wall 1" (default)
    inl1: InletBoundary "Inlet 1" on boundaries 1 | ComponentWise = NormalInflowVelocity; U0in = u_max*(1-(y/Y_t)^2)
    out1: OutletBoundary "Outlet 1" on boundaries 6
    sym1: Symmetry on boundaries 2, 3, 7
  cdeq: ConvectionDiffusionEquation on all domains
    dependent variable u2
    cdeq1: ConvectionDiffusionEquation (default)
    zflx1: ZeroFluxBoundary "Zero Flux 1" (default)
    init1: init "Initial Values 1" (default)
    cfeq1: CoefficientFormPDE on domains 1 | c = {3000e-12, 0, 0, 3000e-12}; f = 0; da = 0
    cfeq2: CoefficientFormPDE on domains 2 | c = {5e-12, 0, 0, 5e-12}; f = 0; da = 0

Mesh
  mesh1 "Mesh 1"
    size: MeshSizeDefault | hmax = 20.1; hmin = 0.09; hcurve = 0.3; hgrad = 1.3
    map1: Map "Mapped 1" on remaining entities
      dis1: Distribution on boundaries 1, 3, 6, 7 | numelem = 10
      dis2: Distribution on boundaries 2, 4, 5 | numelem = 50

Studies
  std1 "Study 1"
    stat: Stationary

Solver configurations
  sol1 "Solution 1" (study std1)
    v1: Variables "Dependent Variables 1"
    s1: Stationary "Stationary Solver 1"
      fc1: FullyCoupled | linsolver = d1; initstep = 0.01; minstep = 1.0E-6; maxiter = 100
      d1: Direct | pivotperturb = 1.0E-13

Datasets
  dset1: Solution | solution = sol1

Plots
  pg1: PlotGroup2D "Concentration (tds)" | data = dset1
    surf1: Surface | expr = c
  pg2: PlotGroup2D "Velocity (spf)" | data = dset1
    surf1: Surface | expr = spf.U
  pg3: PlotGroup2D "Pressure (spf)" | data = dset1
    con1: Contour | expr = p
  pg4: PlotGroup2D "2D Plot Group 4" | data = dset1
    surf1: Surface | expr = u2
  pg5: PlotGroup1D "1D Plot Group 5" | data = dset1
    lngr1: LineGraph on boundaries 5 | expr = tds.ntflux_c; descr = Normal total flux